finish
/clear
/prep7


!**********************************机翼的节点******************
n,1,503.5716,-4.939e-09,78.77212
n,2,503.5716,100.0,78.77212
n,3,503.5716,200.0,78.77212
n,4,503.5716,300.0,78.77212
n,5,503.5716,400.0,78.77212
n,6,503.5716,500.0,78.77212
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n,1830,-241.5,5900.0,-44.9186


!*******************************夹具的节点***********************
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n,2281,-6.1163,-16.6666,1.162706


!******************************加载系统的节点***************
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n,2313,241.5,4700.0,154.7649


!n,2314,-241.5,5000.0,144.7657
!n,2315,241.5,5000.0,144.7649
!n,2316,241.5,4700.0,144.7649
!n,2317,-241.5,4700.0,144.7657
!n,2318,-6.1163,-16.6666,1.162706


!***********************机翼面单元的属性（1为编号）*****************
et,1,shell181
!***********************机翼的材料密度（1为编号）*****************
mp,dens,1,2700
!***********************机翼的材料弹性模量（1为编号）*****************
mp,ex,1,70e9
!***********************机翼的材料泊松比（1为编号）*****************
mp,prxy,1,0.3
!***********************机翼面单元厚度属性（1为编号）*****************
r,1,0.5

!***********************1与et的编号关联*****************
type,1
!***********************1与mp的编号关联*****************
mat,1
!***********************1与r的编号关联*****************
real,1


!***********************机翼面单元*****************
e,144,147,149,143
e,143,149,68,69
e,65,150,148,64
e,150,149,147,148
e,66,67,150,65
e,67,68,149,150
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e,1830,1826,1825,1829


!***********************夹具实体单元的属性et（2为编号）*****************
et,2,solid185
!***********************夹具实体单元的材料mp（2为编号）依次为密度、弹性模量、泊松比*****************
mp,dens,2,2700
mp,ex,2,70e9
mp,prxy,2,0.3
!***********************夹具实体单元的属性r（2为编号）*****************
r,2

!***********************2是夹具实体单元的属性et的编号*****************
type,2
!***********************2是夹具实体单元的材料mp的编号*****************
mat,2
!***********************2是夹具实体单元的属性r的编号*****************
real,2


!***********************夹具实体单元**********************
e,1876,1875,1861,1860,1984,1981,1982,1983
e,1877,1876,1860,1859,1986,1984,1983,1985
e,1878,1877,1859,1858,1988,1986,1985,1987
e,1879,1878,1858,1857,1990,1988,1987,1989
e,1880,1879,1857,1856,1992,1990,1989,1991
e,1881,1880,1856,1855,1994,1992,1991,1993
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e,2002,2004,2088,2087,2152,2154,2238,2237

!***********************加载系统横梁单元的属性et（3为编号）*****************
et,3,beam188
!***********************加载系统横梁单元的材料mp（3为编号）依次为密度、弹性模量、泊松比*****************
mp,dens,3,2700
mp,ex,3,70e9
mp,prxy,3,0.3
!***********************加载系统横梁单元的属性sectype（3为编号）*****************
sectype,3,beam,hrec
secdata,100,100,10,10,10,10

!***********************3是加载系统横梁单元的属性et的编号*****************
type,3
!***********************3是加载系统横梁单元的材料的编号*****************
mat,3
!***********************3是加载系统横梁单元的属性sectype的编号*****************
secnum,3

!***********************加载系统横梁单元*****************
e,2294,2299
e,2299,2297
e,2295,2300
e,2300,2296
e,2299,2301
e,2301,2300
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e,2283,2289


!***********************加载系统纵梁单元的属性et（5为编号）*****************
et,5,beam188
!***********************加载系统纵梁单元的材料mp（5为编号）依次为密度、弹性模量、泊松比*****************
mp,dens,5,2700
mp,ex,5,70e9
mp,prxy,5,0.3
!***********************加载系统纵梁单元的属性sectype（5为编号）*****************
sectype,5,beam,csolid
secdata,10

!***********************5是加载系统纵梁单元的属性et的编号*****************
type,5
!***********************5是加载系统纵梁单元的材料的编号*****************
mat,5
!***********************5是加载系统纵梁单元的属性sectype的编号*****************
secnum,5

!***********************加载系统横梁单元*****************
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e,2295,2283


!***********************加载系统钢绳单元的属性et（4为编号）*****************
et,4,link180
!***********************加载系统钢绳单元的材料mp（4为编号）依次为密度、弹性模量、泊松比*****************
mp,dens,4,2700
mp,ex,4,70e9
mp,prxy,4,0.3
!***********************加载系统钢绳单元的属性r（4为编号）*****************
r,4,1e-06,0,0

!***********************4是加载系统钢绳单元的属性et的编号*****************
type,4
!***********************4是加载系统钢绳单元的材料mp的编号*****************
mat,4
!***********************4是加载系统钢绳单元的属性r的编号*****************
real,4

!***********************加载系统钢绳单元*****************
e,2301,2298

allsel,all

!****************生成连接单元********************
!***************ux,uy,uz,rotx,roty,rotz******
!***************1为主节点，其他为从节点，节点最多17个，后面不再识别，超过17个节点，需要定义另外一个连接cp******
cp,100001,all,1,2,3,4,5,6,7,8,9,10,11,12,13,14,15,16,17
allsel,all

!****************约束设置********************
!***************ux,uy,uz,rotx,roty,rotz******
d,2298,all
d,2298,ux
allsel,all

!****************加载设置********************
!***************fx,fy,fz,mx,my,mz****************************
f,2301,fz,50000
allsel,all

eplot
finish


!****************求解设置 ********************
/sol
!****************0 代表静力计算类型 ********************
antype,0
/status,solu
solve
finish


!****************后处理输出设置********************
/post1
/efacet,1
!****************输出位移结果********************
prnsol,u,comp
!****************输出单元力结果********************
presol,f
finish
